<?xml version="1.0" encoding="UTF-8"?>
<neuroml xmlns="http://www.neuroml.org/schema/neuroml2" xmlns:xsi="http://www.w3.org/2001/XMLSchema-instance" xsi:schemaLocation="http://www.neuroml.org/schema/neuroml2  https://raw.githubusercontent.com/NeuroML/NeuroML2/development/Schemas/NeuroML2/NeuroML_v2beta5.xsd" id="C16_scaled_exp_resample_5">

    <!-- soma -->
    <include href="../channels/na_s.channel.nml"/>
    <include href="../channels/kdr.channel.nml"/>
    <include href="../channels/k.channel.nml"/>
    <include href="../channels/cal.channel.nml"/>
    <include href="../channels/BK.channel.nml"/>

    <!-- dend -->
    <include href="../channels/cah.channel.nml"/>
    <include href="../channels/kca.channel.nml"/>
    <include href="../channels/h.channel.nml"/>
    <include href="../channels/ca.nml"/>
    <include href="../channels/cacc.channel.nml"/>

    <!-- axon -->
    <include href="../channels/na_a.channel.nml"/>

    <!-- all  -->
    <include href="../channels/leak.channel.nml"/>

    <!--
    % Cell morphology
    % p1     = 0.25;        % Cell surface ratio soma/dendrite
    % p2     = 0.15;        % Cell surface ratio axon(hillock)/soma
    % g_int  = 0.13;        % Cell internal conductance

    Adend = ldend*pi*Rdendˆ2
    Asoma = lsoma*pi*Rsomaˆ2

    .25 = ldend*RDendˆ2 / lsoma*pi*Rsomaˆ2

    assume Rdend = 10;
    assume Rsoma = 20;
    assume lsoma = 20;
    assume ldend = 200
    4*1*ldend = lsoma*Rsomaˆ2
    4*1*ldend = 10*400

    assume lsoma = 20;
    ldend = 2250;

    Raxon = 20;
    .15 = laxon*20ˆ2 / 20*20ˆ2

    20 * .15 = laxon = 3;
    -->

    <cell id="C16">

        <notes>Cell morphology generated by neuroConstruct from file: C16_scaled_exp_resample_5.swc
TREES toolbox tree - C16_scaled_exp_resample_5
written by an automatic procedure "swc_tree" part of the TREES package
in MATLAB
copyright 2009 Hermann Cuntz
inode R X Y Z D/2 idpar</notes>

        <morphology id="morphology_C16_scaled_exp_resample_5">

            <segment id="0" name="Comp_1">
                <proximal x="102.92633" y="79.08689" z="38.6505" diameter="10.88"/>
                <distal x="100.670425" y="77.174545" z="37.706013" diameter="7.8625"/>
            </segment>

            <segment id="1" name="Comp_3">
                <parent segment="0"/>
                <distal x="102.43711" y="79.183365" z="34.127316" diameter="10.455"/>
            </segment>

            <segment id="2" name="Comp_4">
                <parent segment="0" fractionAlong="0.0"/>
                <proximal x="102.92633" y="79.08689" z="38.6505" diameter="10.88"/>
                <distal x="102.40329" y="77.30368" z="35.434303" diameter="10.9225"/>
            </segment>

            <segment id="3" name="Comp_5">
                <parent segment="0" fractionAlong="0.0"/>
                <proximal x="102.92633" y="79.08689" z="38.6505" diameter="10.88"/>
                <distal x="102.41283" y="80.32142" z="34.41613" diameter="10.795"/>
            </segment>

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
            <segmentGroup id="Soma" neuroLexId="sao864921383">    <!--
                This group contains an unbranched set of segments, and all of the segmentGroups marked with
                neuroLexId = sao864921383 form a non-overlapping set of all of the segments.
                These segmentGroups correspond to the 'cables' of NeuroML v1.8.1. -->

                <member segment="0"/>

                <member segment="1"/>

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            </segmentGroup>

            <segmentGroup id="ExtraSomaSec_Comp_4" neuroLexId="sao864921383">    <!--
                This group contains an unbranched set of segments, and all of the segmentGroups marked with
                neuroLexId = sao864921383 form a non-overlapping set of all of the segments.
                These segmentGroups correspond to the 'cables' of NeuroML v1.8.1. -->

                <member segment="2"/>

                <member segment="6"/>
            </segmentGroup>

            <segmentGroup id="ExtraSomaSec_Comp_5" neuroLexId="sao864921383">    <!--
                This group contains an unbranched set of segments, and all of the segmentGroups marked with
                neuroLexId = sao864921383 form a non-overlapping set of all of the segments.
                These segmentGroups correspond to the 'cables' of NeuroML v1.8.1. -->

                <member segment="3"/>

                <member segment="7"/>
            </segmentGroup>

            <segmentGroup id="ExtraSomaSec_Comp_6" neuroLexId="sao864921383">    <!--
                This group contains an unbranched set of segments, and all of the segmentGroups marked with
                neuroLexId = sao864921383 form a non-overlapping set of all of the segments.
                These segmentGroups correspond to the 'cables' of NeuroML v1.8.1. -->

                <member segment="4"/>

                <member segment="9"/>
            </segmentGroup>

            <segmentGroup id="ExtraSomaSec_Comp_12" neuroLexId="sao864921383">    <!--
                This group contains an unbranched set of segments, and all of the segmentGroups marked with
                neuroLexId = sao864921383 form a non-overlapping set of all of the segments.
                These segmentGroups correspond to the 'cables' of NeuroML v1.8.1. -->

                <member segment="10"/>
            </segmentGroup>

            <segmentGroup id="Sec_Comp_13" neuroLexId="sao864921383">    <!--
                This group contains an unbranched set of segments, and all of the segmentGroups marked with
                neuroLexId = sao864921383 form a non-overlapping set of all of the segments.
                These segmentGroups correspond to the 'cables' of NeuroML v1.8.1. -->

                <member segment="12"/>

                <member segment="16"/>

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            </segmentGroup>

            <segmentGroup id="Sec_Comp_14" neuroLexId="sao864921383">    <!--
                This group contains an unbranched set of segments, and all of the segmentGroups marked with
                neuroLexId = sao864921383 form a non-overlapping set of all of the segments.
                These segmentGroups correspond to the 'cables' of NeuroML v1.8.1. -->

                <member segment="13"/>

                <member segment="17"/>

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            </segmentGroup>

            <segmentGroup id="Sec_Comp_16" neuroLexId="sao864921383">    <!--
                This group contains an unbranched set of segments, and all of the segmentGroups marked with
                neuroLexId = sao864921383 form a non-overlapping set of all of the segments.
                These segmentGroups correspond to the 'cables' of NeuroML v1.8.1. -->

                <member segment="14"/>

                <member segment="20"/>
            </segmentGroup>

            <segmentGroup id="Sec_Comp_17" neuroLexId="sao864921383">    <!--
                This group contains an unbranched set of segments, and all of the segmentGroups marked with
                neuroLexId = sao864921383 form a non-overlapping set of all of the segments.
                These segmentGroups correspond to the 'cables' of NeuroML v1.8.1. -->

                <member segment="15"/>

                <member segment="22"/>

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            </segmentGroup>

            <segmentGroup id="Sec_Comp_20" neuroLexId="sao864921383">    <!--
                This group contains an unbranched set of segments, and all of the segmentGroups marked with
                neuroLexId = sao864921383 form a non-overlapping set of all of the segments.
                These segmentGroups correspond to the 'cables' of NeuroML v1.8.1. -->

                <member segment="18"/>

                <member segment="25"/>

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            </segmentGroup>

            <segmentGroup id="Sec_Comp_21" neuroLexId="sao864921383">    <!--
                This group contains an unbranched set of segments, and all of the segmentGroups marked with
                neuroLexId = sao864921383 form a non-overlapping set of all of the segments.
                These segmentGroups correspond to the 'cables' of NeuroML v1.8.1. -->

                <member segment="19"/>

                <member segment="24"/>

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            </segmentGroup>

            <segmentGroup id="Sec_Comp_28" neuroLexId="sao864921383">    <!--
                This group contains an unbranched set of segments, and all of the segmentGroups marked with
                neuroLexId = sao864921383 form a non-overlapping set of all of the segments.
                These segmentGroups correspond to the 'cables' of NeuroML v1.8.1. -->

                <member segment="26"/>
            </segmentGroup>

            <segmentGroup id="Sec_Comp_29" neuroLexId="sao864921383">    <!--
                This group contains an unbranched set of segments, and all of the segmentGroups marked with
                neuroLexId = sao864921383 form a non-overlapping set of all of the segments.
                These segmentGroups correspond to the 'cables' of NeuroML v1.8.1. -->

                <member segment="27"/>

                <member segment="35"/>

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            </segmentGroup>

            <segmentGroup id="Sec_Comp_35" neuroLexId="sao864921383">    <!--
                This group contains an unbranched set of segments, and all of the segmentGroups marked with
                neuroLexId = sao864921383 form a non-overlapping set of all of the segments.
                These segmentGroups correspond to the 'cables' of NeuroML v1.8.1. -->

                <member segment="33"/>

                <member segment="41"/>

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            </segmentGroup>

            <segmentGroup id="Sec_Comp_38" neuroLexId="sao864921383">    <!--
                This group contains an unbranched set of segments, and all of the segmentGroups marked with
                neuroLexId = sao864921383 form a non-overlapping set of all of the segments.
                These segmentGroups correspond to the 'cables' of NeuroML v1.8.1. -->

                <member segment="36"/>

                <member segment="44"/>

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            </segmentGroup>

            <segmentGroup id="Sec_Comp_59" neuroLexId="sao864921383">    <!--
                This group contains an unbranched set of segments, and all of the segmentGroups marked with
                neuroLexId = sao864921383 form a non-overlapping set of all of the segments.
                These segmentGroups correspond to the 'cables' of NeuroML v1.8.1. -->

                <member segment="57"/>

                <member segment="66"/>
            </segmentGroup>

            <segmentGroup id="Sec_Comp_62" neuroLexId="sao864921383">    <!--
                This group contains an unbranched set of segments, and all of the segmentGroups marked with
                neuroLexId = sao864921383 form a non-overlapping set of all of the segments.
                These segmentGroups correspond to the 'cables' of NeuroML v1.8.1. -->

                <member segment="60"/>

                <member segment="69"/>

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            </segmentGroup>

            <segmentGroup id="Sec_Comp_77" neuroLexId="sao864921383">    <!--
                This group contains an unbranched set of segments, and all of the segmentGroups marked with
                neuroLexId = sao864921383 form a non-overlapping set of all of the segments.
                These segmentGroups correspond to the 'cables' of NeuroML v1.8.1. -->

                <member segment="75"/>

                <member segment="85"/>

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            </segmentGroup>

            <segmentGroup id="Sec_Comp_80" neuroLexId="sao864921383">    <!--
                This group contains an unbranched set of segments, and all of the segmentGroups marked with
                neuroLexId = sao864921383 form a non-overlapping set of all of the segments.
                These segmentGroups correspond to the 'cables' of NeuroML v1.8.1. -->

                <member segment="78"/>

                <member segment="90"/>

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            </segmentGroup>

            <segmentGroup id="Sec_Comp_82" neuroLexId="sao864921383">    <!--
                This group contains an unbranched set of segments, and all of the segmentGroups marked with
                neuroLexId = sao864921383 form a non-overlapping set of all of the segments.
                These segmentGroups correspond to the 'cables' of NeuroML v1.8.1. -->

                <member segment="80"/>

                <member segment="93"/>

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            </segmentGroup>

            <segmentGroup id="Sec_Comp_85" neuroLexId="sao864921383">    <!--
                This group contains an unbranched set of segments, and all of the segmentGroups marked with
                neuroLexId = sao864921383 form a non-overlapping set of all of the segments.
                These segmentGroups correspond to the 'cables' of NeuroML v1.8.1. -->

                <member segment="83"/>

                <member segment="94"/>

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            </segmentGroup>

            <segmentGroup id="Sec_Comp_133" neuroLexId="sao864921383">    <!--
                This group contains an unbranched set of segments, and all of the segmentGroups marked with
                neuroLexId = sao864921383 form a non-overlapping set of all of the segments.
                These segmentGroups correspond to the 'cables' of NeuroML v1.8.1. -->

                <member segment="131"/>

                <member segment="142"/>

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            </segmentGroup>

            <segmentGroup id="Sec_Comp_134" neuroLexId="sao864921383">    <!--
                This group contains an unbranched set of segments, and all of the segmentGroups marked with
                neuroLexId = sao864921383 form a non-overlapping set of all of the segments.
                These segmentGroups correspond to the 'cables' of NeuroML v1.8.1. -->

                <member segment="132"/>

                <member segment="141"/>

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            </segmentGroup>

            <segmentGroup id="all">
                <include segmentGroup="Soma"/>
                <include segmentGroup="ExtraSomaSec_Comp_4"/>
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            </segmentGroup>

            <segmentGroup id="Colour_White">
                <include segmentGroup="Soma"/>
                <include segmentGroup="ExtraSomaSec_Comp_4"/>
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            </segmentGroup>

            <segmentGroup id="soma_group" neuroLexId="GO:0043025">    <!--Soma group-->

                <include segmentGroup="Soma"/>
            </segmentGroup>

            <segmentGroup id="axon_group" neuroLexId="GO:0030425">    <!--Dendrite group-->

                <include segmentGroup="ExtraSomaSec_Comp_4"/>
                <include segmentGroup="ExtraSomaSec_Comp_5"/>
                <include segmentGroup="ExtraSomaSec_Comp_6"/>
                <include segmentGroup="ExtraSomaSec_Comp_12"/>
            </segmentGroup>

            <segmentGroup id="ExtraSomaSegments">
                <include segmentGroup="ExtraSomaSec_Comp_4"/>
                <include segmentGroup="ExtraSomaSec_Comp_5"/>
                <include segmentGroup="ExtraSomaSec_Comp_6"/>
                <include segmentGroup="ExtraSomaSec_Comp_12"/>
            </segmentGroup>

            <segmentGroup id="Colour_DarkGrey">
                <include segmentGroup="Sec_Comp_13"/>
                <include segmentGroup="Sec_Comp_14"/>
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            </segmentGroup>

            <segmentGroup id="dendrite_group" neuroLexId="GO:0030424">    <!--Axon group-->

                <include segmentGroup="Sec_Comp_13"/>
                <include segmentGroup="Sec_Comp_14"/>
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            </segmentGroup>

        </morphology>

            <!--Adding the biophysical parameters-->

                <biophysicalProperties id="biophys">

            <membraneProperties>
                <!-- soma -->
                <channelDensity condDensity="30 mS_per_cm2" id="na_s_soma" segmentGroup="soma_group" ionChannel="na_s" ion="na" erev="55 mV"/>
                <channelDensity condDensity="30 mS_per_cm2" id="kdr_soma" segmentGroup="soma_group"
                ionChannel="kdr" ion="k" erev="-75 mV"/>
                <channelDensity condDensity="15 mS_per_cm2" id="k_soma" segmentGroup="soma_group"
                ionChannel="k" ion="k" erev="-75 mV"/>
                <channelDensity condDensity="20 mS_per_cm2" id="cal_soma" segmentGroup="soma_group"
                ionChannel="cal" ion="ca" erev="120 mV"/>
		<channelDensity condDensity="20 mS_per_cm2" id="BK_soma" segmentGroup="soma_group"
                ionChannel="BK" ion="k" erev="-88 mV"/>

                <!-- dendrite 10 35 25-->
                <channelDensity condDensity="10 mS_per_cm2" id="cah_dend" segmentGroup="dendrite_group" ionChannel="cah" ion="ca" erev="120 mV"/>
                <channelDensity condDensity="35 mS_per_cm2" id="kca_dend" segmentGroup="dendrite_group" ionChannel="kca" ion="k" erev="-75 mV"/>
                <channelDensity condDensity="25 mS_per_cm2" id="h_dend" segmentGroup="dendrite_group" ionChannel="h" ion="h" erev="-43 mV"/>
                <channelDensity condDensity="0.7 mS_per_cm2" id="cacc_dend" segmentGroup="dendrite_group" ionChannel="cacc" ion="cl" erev="-45 mV"/>

                <!-- axon -->
                <channelDensity condDensity="200 mS_per_cm2" id="na_axon" segmentGroup="axon_group" ionChannel="na_a" ion="na" erev="55 mV"/>
                <channelDensity condDensity="200 mS_per_cm2" id="k_axon" segmentGroup="axon_group" ionChannel="k" ion="k" erev="-75 mV"/>

                <channelDensity condDensity="1.3e-2 mS_per_cm2" id="leak_all" segmentGroup="all" ionChannel="leak" ion="non_specific" erev="10 mV"/>

                <spikeThresh value="0 mV"/>
                <specificCapacitance value="1 uF_per_cm2"/>
                <initMembPotential value="-65.0 mV"/>

            </membraneProperties>

            <intracellularProperties>
                <species segmentGroup="dendrite_group" id="ca" ion="ca" concentrationModel="ca_conc" initialConcentration="3.7152 mM" initialExtConcentration="3.0mM"/>

                <resistivity value="100 ohm_cm" segmentGroup="soma_group"/>
                <resistivity value="100 ohm_cm" segmentGroup="dendrite_group"/>
                <resistivity value="100 ohm_cm" segmentGroup="axon_group"/>
            </intracellularProperties>

        </biophysicalProperties>

    </cell>

</neuroml>
