<Lems>

    <!--

        This LEMS file has been automatically generated using PyNeuroML v0.5.3 (libNeuroML v0.2.51)

     -->

    <!-- Specify which component to run -->
    <Target component="Test"/>

    <!-- Include core NeuroML2 ComponentType definitions -->
    <Include file="Cells.xml"/>
    <Include file="Networks.xml"/>
    <Include file="Simulation.xml"/>

    <Include file="../pynmlNetworks/nml_C51A5.net.nml"/>
    <Include file="../Cells/C51A5_scaled_exp_resample_5.cell.nml"/>
    <Include file="../channels/na_s.channel.nml"/>
    <Include file="../channels/ExpTime.nml"/>
    <Include file="../channels/kdr.channel.nml"/>
    <Include file="../channels/k.channel.nml"/>
    <Include file="../channels/cal.channel.nml"/>
    <Include file="../channels/BK.channel.nml"/>
    <Include file="../channels/cah.channel.nml"/>
    <Include file="../channels/kca.channel.nml"/>
    <Include file="../channels/h.channel.nml"/>
    <Include file="../channels/ca.nml"/>
    <Include file="../channels/cacc.channel.nml"/>
    <Include file="../channels/na_a.channel.nml"/>
    <Include file="../channels/leak.channel.nml"/>

    <Simulation id="Test" length="10000ms" step="0.025ms" target="network_of_C51A" seed="12345">  <!-- Note seed: ensures same random numbers used every run -->

        <Display id="Voltage" title="Dendrite trace" timeScale="1ms" xmin="-1000.0" xmax="11000.0" ymin="-100" ymax="70">
            <Line id="69" quantity="population_of_C51A/0/C51A/69/v" scale="1" color="#d54f33" timeScale="1ms"/>
            <Line id="8" quantity="population_of_C51A/0/C51A/8/v" scale="1" color="#0534e4" timeScale="1ms"/>
            <Line id="0" quantity="population_of_C51A/0/C51A/0/v" scale="1" color="#98e752" timeScale="1ms"/>
        </Display>

        <OutputFile id="file" fileName="Test.vd.dat">
            <OutputColumn id="69" quantity="population_of_C51A/0/C51A/69/v"/>
            <OutputColumn id="8" quantity="population_of_C51A/0/C51A/8/v"/>
            <OutputColumn id="0" quantity="population_of_C51A/0/C51A/0/v"/>
        </OutputFile>

    </Simulation>

</Lems>
