<neuroml xmlns="http://www.neuroml.org/schema/neuroml2"  xmlns:xs="http://www.w3.org/2001/XMLSchema" xmlns:xsi="http://www.w3.org/2001/XMLSchema-instance" xsi:schemaLocation="http://www.neuroml.org/schema/neuroml2 https://raw.github.com/NeuroML/NeuroML2/development/Schemas/NeuroML2/NeuroML_v2.1.xsd" id="net_C25C">
    <include href="../Cells/C25C_scaled_exp_resample_5.cell.nml"/>
    <pulseGenerator id="iclamp0" delay="0ms" duration="50ms" amplitude="-2.5nA"/>
    <pulseGenerator id="iclamp1" delay="0ms" duration="50ms" amplitude="-2.5nA"/>
    <network id="network_of_C25C" type="networkWithTemperature" temperature="37degC">
        <population id="population_of_C25C" component="C25C" size="1" type="populationList">
            <instance id="0">
                <location x="0." y="0." z="0."/>
            </instance>
        </population>
        <inputList id="Iclamp1" population="population_of_C25C" component="iclamp1">
            <input id="0" target="../population_of_C25C/0/C25C" destination="synapses"/>
            <input id="1" target="../population_of_C25C/0/C25C" destination="synapses"/>
        </inputList>
    </network>
</neuroml>
