<?xml version="1.0" encoding="UTF-8"?>
<Lems>
    <!-- Taken and edited from https://github.com/Heidecamper/IONML-->
    <!-- Example with Simple cell specifying segment details-->

    <!-- This is a file which can be read and executed by the LEMS Interpreter.
         It imports the LEMS definitions of the core NeuroML 2 Components,
         imports in "pure" NeuroML 2 and contains some LEMS elements for running
         a simulation -->

    <Target component="sim1" reportFile="report.ex5.txt"/>

    <Include file="Cells.xml"/>
    <Include file="Networks.xml"/>
    <Include file="Simulation.xml"/>

    <!-- Including file with a <neuroml> root, a "real" NeuroML 2 file -->
    <Include file="nml_C51A_clamp.net.nml"/>

    <Simulation id="sim1" length="300ms" step="0.01ms" target="net">

        <Display id="d1" title="voltage" timeScale="1ms" xmin="0" xmax="300" ymin="-90" ymax="50">
                <Line id="v" quantity="pop/0/C51A/v" scale="1mV" color="#cccccc" timeScale="1ms"/>

        </Display>

    </Simulation>

</Lems>
